<?xml version="1.0"?>

<propeller name="CS-40B">
  <ixx>10.0322 </ixx>
  <diameter unit="IN">114.2 </diameter>
  <numblades> 3 </numblades>
  <gearratio>1.4545 </gearratio>
  <p_factor>   9.02 </p_factor>
  <minpitch> 25.0 </minpitch>
  <maxpitch> 45.0 </maxpitch>
  <minrpm> 1238 </minrpm>
  <maxrpm> 1778 </maxrpm>
  <ct_factor> 0.860 </ct_factor>
  <cp_factor> 0.750 </cp_factor>
 <!-- thrust coefficient as a function of advance ratio and blade angle -->
  <table name="C_THRUST" type="internal">
      <tableData>
	15	20	25	30	35	40	45
0.0	0.1400	0.1580	0.1610	0.1680	0.1730	0.1780	0.1790
0.1	0.1300	0.1560	0.1580	0.1660	0.1710	0.1770	0.1800
0.2	0.1170	0.1510	0.1560	0.1630	0.1690	0.1755	0.1810
0.3	0.1000	0.1400	0.1540	0.1610	0.1670	0.1735	0.1830
0.4	0.0840	0.1280	0.1510	0.1590	0.1645	0.1712	0.1860
0.5	0.0650	0.1120	0.1470	0.1550	0.1618	0.1695	0.1885
0.6	0.0460	0.0950	0.1350	0.1530	0.1595	0.1675	0.1880
0.7	0.0250	0.0730	0.1200	0.1505	0.1575	0.1630	0.1845
0.8	0.0030	0.0510	0.1010	0.1420	0.1550	0.1580	0.1790
0.9	-0.0170	0.0300	0.0810	0.1300	0.1530	0.1510	0.1725
1.0	-0.0390	0.0090	0.0600	0.1130	0.1470	0.1475	0.1670
1.1	-0.0604	-0.0120	0.0395	0.0920	0.1330	0.1485	0.1620
1.2	-0.0818	-0.0329	0.0190	0.0715	0.1180	0.1470	0.1590
1.3	-0.1032	-0.0538	-0.0020	0.0500	0.1000	0.1410	0.1580
1.4	-0.1246	-0.0747	-0.0225	0.0300	0.0800	0.1290	0.1585
1.5	-0.1460	-0.0956	-0.0432	0.0100	0.0620	0.1140	0.1585
1.6	-0.1500	-0.1165	-0.0639	-0.0100	0.0430	0.0980	0.1520
1.7	-0.1500	-0.1374	-0.0846	-0.0295	0.0250	0.0810	0.1410
1.8	-0.1500	-0.1580	-0.1053	-0.0492	0.0070	0.0632	0.1290
1.9	-0.1500	-0.1580	-0.1260	-0.0689	-0.0120	0.0460	0.1140
2.0	-0.1500	-0.1580	-0.1467	-0.0886	-0.0300	0.0300	0.1000
2.1	-0.1500	-0.1580	-0.1610	-0.1083	-0.0483	0.0130	0.0850
2.2	-0.1500	-0.1580	-0.1610	-0.1280	-0.0666	-0.0032	0.0700
2.3	-0.1500	-0.1580	-0.1610	-0.1477	-0.0849	-0.0209	0.0550
2.4	-0.1500	-0.1580	-0.1610	-0.1674	-0.1032	-0.0384	0.0390
2.5	-0.1500	-0.1580	-0.1610	-0.1680	-0.1215	-0.0560	0.0230
2.6	-0.1500	-0.1580	-0.1610	-0.1680	-0.1398	-0.0735	0.0080
2.7	-0.1500	-0.1580	-0.1610	-0.1680	-0.1581	-0.0911	-0.0059
2.8	-0.1500	-0.1580	-0.1610	-0.1680	-0.1730	-0.1086	-0.0220
      </tableData>
  </table>

 <!-- power coefficient as a function of advance ratio and blade angle -->
  <table name="C_POWER" type="internal">
     <tableData>
	15	20	25	30	35	40	45
0.0	0.0600	0.0895	0.1490	0.2100	0.2604	0.3028	0.3783
0.1	0.0590	0.0890	0.1420	0.2040	0.2554	0.3018	0.3793
0.2	0.0575	0.0880	0.1320	0.1980	0.2485	0.2989	0.3802
0.3	0.0550	0.0870	0.1280	0.1900	0.2426	0.2960	0.3802
0.4	0.0500	0.0845	0.1280	0.1840	0.2356	0.2920	0.3783
0.5	0.0430	0.0800	0.1230	0.1780	0.2277	0.2862	0.3764
0.6	0.0340	0.0720	0.1180	0.1700	0.2198	0.2822	0.3715
0.7	0.0210	0.0610	0.1100	0.1630	0.2138	0.2734	0.3638
0.8	0.0030	0.0470	0.1000	0.1580	0.2089	0.2646	0.3560
0.9	-0.0210	0.0310	0.0870	0.1495	0.2030	0.2548	0.3463
1.0	-0.0410	0.0110	0.0690	0.1380	0.1970	0.2450	0.3376
1.1	-0.0600	-0.0150	0.0500	0.1200	0.1852	0.2445	0.3298
1.2	-0.0600	-0.0367	0.0280	0.1000	0.1707	0.2421	0.3220
1.3	-0.0600	-0.0566	-0.0010	0.0760	0.1513	0.2357	0.3196
1.4	-0.0600	-0.0779	-0.0280	0.0500	0.1287	0.2176	0.3149
1.5	-0.0600	-0.0895	-0.0535	0.0240	0.1067	0.1995	0.3088
1.6	-0.0600	-0.0895	-0.0798	-0.0020	0.0812	0.1824	0.2999
1.7	-0.0600	-0.0895	-0.1061	-0.0280	0.0554	0.1607	0.2860
1.8	-0.0600	-0.0895	-0.1324	-0.0540	0.0208	0.1358	0.2717
1.9	-0.0600	-0.0895	-0.1490	-0.0800	-0.0060	0.1078	0.2496
2.0	-0.0600	-0.0895	-0.1490	-0.1060	-0.0365	0.0804	0.2318
2.1	-0.0600	-0.0895	-0.1490	-0.1320	-0.0664	0.0539	0.2086
2.2	-0.0600	-0.0895	-0.1490	-0.1580	-0.0963	0.0250	0.1882
2.3	-0.0600	-0.0895	-0.1490	-0.1840	-0.1262	-0.0019	0.1639
2.4	-0.0600	-0.0895	-0.1490	-0.2100	-0.1561	-0.0290	0.1310
2.5	-0.0600	-0.0895	-0.1490	-0.2100	-0.1860	-0.0561	0.0970
2.6	-0.0600	-0.0895	-0.1490	-0.2100	-0.2159	-0.0831	0.0582
2.7	-0.0600	-0.0895	-0.1490	-0.2100	-0.2458	-0.1101	0.0175
2.8	-0.0600	-0.0895	-0.1490	-0.2100	-0.2630	-0.1371	-0.0204
     </tableData>
  </table>

<!-- thrust effects of helical tip Mach -->
<!-- zero's Cp/Ct tabkes akready include this effect, so it's always 1.0 -->
<table name="CT_MACH" type="internal">
  <tableData>
    0.85   1.0
    1.05   1.0
  </tableData>
</table>

<!-- power-required effects of helical tip Mach -->
<!--
<table name="CP_MACH" type="internal">
  <tableData>
    0.80   1.0
    1.05   1.0
    2.00   1.0
  </tableData>
</table>
-->

</propeller>
